f1 := 28*10^9
εo := 8.85418782*10^-12
f2 := 30*10^9
μo := 4*π*10^-7
ε := 2.33
с := 299792458
h := 0.254*10^-3
f := (f1 + f2)/2 = 29000000000
# Размеры основго патча | Размер U-слота
Wuslot := 0.2*10^-3
W := 1/(2*f*sqrt(μo*εo))*sqrt(2/(ε + 1)) = 0.00400577
Luslot := 1/2*1/(f*sqrt(ε*εo*μo)) = 0.00338622
W/h = 15.7707
Luslot/4 = 0.000846554
ΔL := h*(0.412*(ε + 0.3)*(W/h + 0.264)/((ε - 0.258)*(W/h + 0.8))) = 0.000128534
1/2*1/(f*sqrt(ε*εo*μo)) - 2*ΔL = 0.00312915
# Размеры Cross-слота
Wcross := 1*10^-3
L1cross := 1/4*1/(f*sqrt(ε*εo*μo)) = 0.00169311
L2cross := 1/4*1/(f*sqrt(ε*εo*μo)) = 0.00169311
# Quasistatic effective dielectric constant (Wheeler and Schneider)
Bt := 377*π/(2*50*sqrt(ε)) = 7.75913
Wdt := 2/π*(Bt - 1 - ln(2*Bt - 1) + (ε - 1)/(2*ε)*(ln(Bt - 1) + 0.39 - 0.61/ε)) = 2.97028
εefft := (ε + 1)/2 + (ε - 1)/2*1/sqrt(1 + 12*1/Wdt) = 1.96121
# Dispersion effect (Kobayashi)
Fpis := с/(2*π*h*(0.75 + (0.75 - 0.332/εefft^1.73)*Wdt))*atan(ε*sqrt((εefft - 1)/(ε - εefft)))/sqrt(ε - εefft) = 1.51869e11
mc := 1 + 1.4/(1 + Wdt)*(0.15 - 0.235*exp(-0.45*f/Fpis)) = 0.976851
mo := 1 + 1/(1 + sqrt(Wdt)) + 0.32*(1/(1 + sqrt(Wdt)))^3 = 1.38302  # Strip thinkness correction Wheeler
m := mo*mc = 1.35101
ΔW1 := h/π*ln(4*e/sqrt((0.035*10^-3/h)^2 + (1/π/(Wdt + 1.10)))) = 0.000287168
εF := ε - (ε - εefft)/(1 + (f/Fpis)^m) = 1.9968
ΔW2 := 1/2*ΔW1*(1 + 1/εF) = 0.000215491
Lt := π/2/(sqrt(εF)*2*π*f/с) = 0.00182892
λt := с/(f*sqrt(εF)) = 0.0073157
Wt := Wdt*h - ΔW2 = 0.000538959
